# 3d Lennard-Jones melt

units           lj #lennard jones units (dimensionless)
atom_style      atomic #all the info needed for metals

lattice         fcc 0.8442 #(face centered cubic, and the density)
region          box block 0 10 0 10 0 10 #creates a shape
create_box      1 box #creates box
create_atoms    1 box #creates atoms
mass            1 1.0 #mass of atom (LJ units)

velocity        all create 3.0 87287 loop geom #random initial velocities

pair_style      lj/cut 2.5
pair_coeff      1 1 1.0 1.0 2.5

neighbor        0.3 bin
neigh_modify    every 20 delay 0 check no

fix             1 all nve #updates the atoms velocity and position

#dump           id all atom 50 dump.melt

#dump           2 all image 25 image.*.jpg type type &
#               axes yes 0.8 0.02 view 60 -30
#dump_modify    2 pad 3

#dump           3 all movie 25 movie.mpg type type &
#               axes yes 0.8 0.02 view 60 -30
#dump_modify    3 pad 3

thermo          50 #prints the thermo details every 50 steps
run             250 #run for 250 steps
